# OpenSim document version 40600
Model rehab_quaternion_live_link_demo:
  PhysicalOffsetFrame femur_r_imu: socket_parent=/bodyset/femur_r translation=(0 0.1 0) [meters]
  PhysicalOffsetFrame tibia_r_imu: socket_parent=/bodyset/tibia_r translation=(0 0.1 0)
  Ground
  BodySet:
    Body femur_r: mass=1 [kg] mass_center=(0 0 0) inertia=(0.01 0.01 0.01 0 0 0)
      Cylinder femur_r_geom_1: radius=0.045 half_height=0.225
    Body tibia_r: mass=1 mass_center=(0 0 0) inertia=(0.01 0.01 0.01 0 0 0)
      Cylinder tibia_r_geom_1: radius=0.04 half_height=0.225
  JointSet:
    WeldJoint hip_r: socket_parent_frame=ground_offset socket_child_frame=femur_r_offset
      PhysicalOffsetFrame ground_offset: socket_parent=/ground translation=(0 0.9 0)
      PhysicalOffsetFrame femur_r_offset: socket_parent=/bodyset/femur_r translation=(0 0.225 0)
    PinJoint knee_r: socket_parent_frame=femur_r_offset socket_child_frame=tibia_r_offset
      Coordinate knee_angle_r
      PhysicalOffsetFrame femur_r_offset: socket_parent=/bodyset/femur_r translation=(0 -0.225 0)
      PhysicalOffsetFrame tibia_r_offset: socket_parent=/bodyset/tibia_r translation=(0 0.225 0)
